// SBML level 3 version 1

model LacI_Inverter(Cell, LacI, TetR, GFP)

  // Compartments:
  compartment Cell = 1;

  // Species:
  substanceOnly species $LacI in Cell = 0;
  substanceOnly species TetR in Cell = 0;
  substanceOnly species GFP in Cell = 0;
  substanceOnly species pLac in Cell = 2;

  // Parameters:
  kr_f = 0.5; kr_f is "Forward repression binding rate";
  kr_r = 1; kr_r is "Reverse repression binding rate";
  ka_f = 0.0033; ka_f is "Forward activation binding rate";
  ka_r = 1; ka_r is "Reverse activation binding rate";
  ko_f = 0.033; ko_f is "Forward RNAP binding rate";
  ko_r = 1; ko_r is "Reverse RNAP binding rate";
  kao_f = 1; kao_f is "Forward activated RNAP binding rate";
  kao_r = 1; kao_r is "Reverse activated RNAP binding rate";
  nc = 2; nc is "Stoichiometry of binding";
  nr = 30; nr is "Initial RNAP count";
  ko = 0.05; ko is "Open complex production rate";
  kb = 0.0001; kb is "Basal production rate";
  ng = 2; ng is "Initial promoter count";
  np = 10; np is "Stoichiometry of production";
  ka = 0.25; ka is "Activated production rate";

  // Reactions:
  pLac_prod_GFP_pLac_prod_TetR: => 10 GFP + 10 TetR; pLac*ko*(ko_f/ko_r)*nr/(1 + ko_f/ko_r*nr + (kr_f/kr_r*LacI)^nc);  // modifiers: pLac, LacI
end

model TetR_Inverter(Cell, TetR, LacI)

  // Compartments:
  compartment Cell = 1;

  // Species:
  substanceOnly species $TetR in Cell = 0;
  substanceOnly species LacI in Cell = 0;
  substanceOnly species P0 in Cell = 2;

  // Parameters:
  kr_f = 0.5; kr_f is "Forward repression binding rate";
  kr_r = 1; kr_r is "Reverse repression binding rate";
  ka_f = 0.0033; ka_f is "Forward activation binding rate";
  ka_r = 1; ka_r is "Reverse activation binding rate";
  ko_f = 0.033; ko_f is "Forward RNAP binding rate";
  ko_r = 1; ko_r is "Reverse RNAP binding rate";
  kao_f = 1; kao_f is "Forward activated RNAP binding rate";
  kao_r = 1; kao_r is "Reverse activated RNAP binding rate";
  nc = 2; nc is "Stoichiometry of binding";
  nr = 30; nr is "Initial RNAP count";
  ko = 0.05; ko is "Open complex production rate";
  kb = 0.0001; kb is "Basal production rate";
  ng = 2; ng is "Initial promoter count";
  np = 10; np is "Stoichiometry of production";
  ka = 0.25; ka is "Activated production rate";

  // Reactions:
  P0_prod_LacI: => 10 LacI; P0*ko*(ko_f/ko_r)*nr/(1 + ko_f/ko_r*nr + (kr_f/kr_r*TetR)^nc);  // modifiers: P0, TetR
end

model GeneticToggle(Cell, LacI, GFP, TetR, Degradation_TetR, Degradation_GFP, Degradation_LacI)

  // Sub-modules:
  C1: LacI_Inverter();
  C2: TetR_Inverter();

  // Compartments:
  compartment Cell = 1; C1.Cell is Cell; C2.Cell is Cell;

  // Species:
  substanceOnly species IPTG in Cell = 0;
  substanceOnly species LacI in Cell = 0; C1.LacI is LacI; C2.LacI is LacI;
  substanceOnly species LacI_IPTG in Cell = 0;
  substanceOnly species aTc in Cell = 0;
  substanceOnly species TetR_aTc in Cell = 0;
  substanceOnly species GFP in Cell = 0; C1.GFP is GFP;
  substanceOnly species TetR in Cell = 0; C2.TetR is TetR; C1.TetR is TetR;

  // Parameters:
  kc_f = 0.05; kc_f is "Forward complex formation rate";
  kc_r = 1; kc_r is "Reverse complex formation rate";
  nc = 2; nc is "Stoichiometry of binding";
  kd = 0.0075; kd is "Degradation rate";

  // Reactions:
  Complex_LacI_IPTG: 2 LacI + 2 IPTG -> LacI_IPTG; kc_f*LacI^nc*IPTG^nc - kc_r*LacI_IPTG;
  Degradation_LacI_IPTG: LacI_IPTG => ; kd*LacI_IPTG;
  Degradation_TetR: TetR => ; kd*TetR;
  Complex_TetR_aTc: 2 TetR + 2 aTc -> TetR_aTc; kc_f*TetR^nc*aTc^nc - kc_r*TetR_aTc;
  Degradation_TetR_aTc: TetR_aTc => ; kd*TetR_aTc;
  Degradation_GFP: GFP => ; kd*GFP;
  Degradation_LacI: LacI => ; kd*LacI;
end
